// SBML level 3 version 2

model realistic_sclerostin_biosensor()

  // Compartments:
  compartment cell = 1;

  // Species:
  species Sclerostin in cell = 0.5;
  species Wnt in cell = 0.5;
  species Receptor in cell = 10;
  species Receptor_Sclero in cell = 0;
  species Receptor_Wnt in cell = 0;
  species Signal in cell = 0;
  species Signal_Amplified in cell = 0;
  species mRNA in cell = 0;
  species Reporter in cell = 0;
  species Repressor in cell = 0;
  species ATP in cell = 1000;
  species Glucose in cell = 100;

  // Parameters:
  kon_sclero = 5;
  koff_sclero = 0.5;
  kon_wnt = 4;
  koff_wnt = 0.4;
  k_signal = 2;
  k_amplify = 8;
  k_signal_decay = 2;
  amplification_factor = 8;
  k_transcription = 1;
  promoter_strength = 1.8;
  K_promoter = 0.5;
  n_hill = 2;
  k_translation = 5;
  k_mRNA_deg = 0.5;
  k_protein_deg = 0.2;
  k_repressor_prod = 0.5;
  k_repressor_deg = 0.3;
  K_repression = 1;
  wnt_interference = 0.3;
  cost_transcription = 0.5;
  cost_translation = 1;
  k_atp_regen = 0.5;
  noise_amplitude = 0.12;
  k_glucose_import = 1;

  // Reactions:
  R1: Sclerostin + Receptor -> Receptor_Sclero; kon_sclero*Sclerostin*Receptor;
  R2: Receptor_Sclero -> Receptor; koff_sclero*Receptor_Sclero;
  R3: Wnt + Receptor -> Receptor_Wnt; kon_wnt*Wnt*Receptor;
  R4: Receptor_Wnt -> Wnt + Receptor; koff_wnt*Receptor_Wnt;
  R5: Receptor_Sclero -> Receptor_Sclero + Signal; k_signal*Receptor_Sclero*(1 - wnt_interference*Wnt);  // modifiers: Wnt
  R6: Signal -> Signal_Amplified; k_amplify*Signal;
  R7: Signal -> ; k_signal_decay*Signal;
  R8: Signal_Amplified -> ; k_signal_decay*Signal_Amplified*0.5;
  R9: -> mRNA; k_transcription*promoter_strength*(Signal_Amplified^n_hill/(K_promoter^n_hill + Signal_Amplified^n_hill))*(1/(1 + Repressor/K_repression));  // modifiers: Signal_Amplified, Repressor
  R10: mRNA -> ; k_mRNA_deg*mRNA;
  R11: mRNA -> mRNA + Reporter; k_translation*mRNA;
  R12: Reporter -> ; k_protein_deg*Reporter;
  R13: Signal_Amplified -> Signal_Amplified + Repressor; k_repressor_prod*Signal_Amplified;
  R14: Repressor -> ; k_repressor_deg*Repressor;
  R15: ATP -> ; cost_transcription*k_transcription*promoter_strength*(Signal_Amplified^n_hill/(K_promoter^n_hill + Signal_Amplified^n_hill))*(1/(1 + Repressor/K_repression));  // modifiers: Signal_Amplified, Repressor
  R16: ATP -> ; cost_translation*k_translation*mRNA;  // modifiers: mRNA
  R17: Glucose -> ATP; k_atp_regen*Glucose*(1000 - ATP)/1000;
  R18: -> Glucose; k_glucose_import*(100 - Glucose)/100;

  // Events:
  E0: at (time >= 0.01): Sclerostin = 0.5;
  E1: at (time >= 20.01): Sclerostin = 0.55;
  E2: at (time >= 60.01): Sclerostin = 0.5;
  E3: at (time >= 80.01): Sclerostin = 0.75;
  E4: at (time >= 120.01): Sclerostin = 0.5;
end
